OpenVSP model (file version 5), 6 components.
Geometry view with OpenVSP parameter names; values to 6 digits, angles in degrees, lengths in the model's unit.
Overall bounding box: X_Min=0 X_Len=8.02693 Y_Min=-5.47907 Y_Len=10.9581 Z_Min=-0.76 Z_Len=3.05

Fuselage "Fuselage"
  location (X Y Z) 0 0 0, rotation 0 0 0
  bounding box size 7.5 1.90001 1.52
  mass: Density=50 Shell_Flag=0 Mass_Area=1 Mass_Prior=0
  Design: Length=7.5
  cross sections:
    n   XLocPercent  YLocPercent  ZLocPercent  shape
    0   0            0            0            point
    1   0.04         0            0            circle Circle_Diameter=0.75
    2   0.0504167    0            0            circle Circle_Diameter=0.85
    3   0.0608333    0            0            ellipse Ellipse_Height=0.92 Ellipse_Width=1
    4   0.07125      0            0            ellipse Ellipse_Height=1.1 Ellipse_Width=1.2
    5   0.0816667    0            0            ellipse Ellipse_Height=1.15 Ellipse_Width=1.4
    6   0.0920833    0            0            super ellipse Super_Height=1.25 Super_M=2.5 Super_M_bot=2.5 Super_MaxWidthLoc=0 Super_N=2.5 Super_N_bot=2 Super_TopBotSym=0 Super_Width=1.5
    7   0.1025       0            0            super ellipse Super_Height=1.33 Super_M=3 Super_MaxWidthLoc=0 Super_N=3 Super_Width=1.65
    8   0.123333     0            0            super ellipse Super_Height=1.375 Super_M=3 Super_MaxWidthLoc=0 Super_N=3 Super_Width=1.675
    9   0.144167     0            0            super ellipse Super_Height=1.4 Super_M=3 Super_MaxWidthLoc=0 Super_N=3 Super_Width=1.8
    10  0.165        0            0            super ellipse Super_Height=1.45 Super_M=3 Super_MaxWidthLoc=0 Super_N=3 Super_Width=1.84
    11  0.185833     0            0            super ellipse Super_Height=1.495 Super_M=3 Super_MaxWidthLoc=0 Super_N=3 Super_Width=1.8975
    12  0.206667     0            0            super ellipse Super_Height=1.52 Super_M=3 Super_MaxWidthLoc=0 Super_N=3 Super_Width=1.9
    13  0.231667     0            0            super ellipse Super_Height=1.495 Super_M=3 Super_MaxWidthLoc=0 Super_N=3 Super_Width=1.8975
    14  0.256667     0            0            super ellipse Super_Height=1.43 Super_M=3 Super_MaxWidthLoc=0 Super_N=3 Super_Width=1.815
    15  0.281667     0            0            super ellipse Super_Height=1.365 Super_M=3 Super_MaxWidthLoc=0 Super_N=3 Super_Width=1.7325
    16  0.306667     0            0            super ellipse Super_Height=1.3 Super_M=3 Super_MaxWidthLoc=0 Super_N=3 Super_Width=1.69
    17  0.4          0            0            circle Circle_Diameter=1.1
    18  0.6          0            0            circle Circle_Diameter=0.7
    19  0.75         0            0.011        circle Circle_Diameter=0.5
    20  0.875        0            0.022        circle Circle_Diameter=0.3
    21  1            0            0.028        point

Wing "Wing"
  location (X Y Z) 1.7 0 -0.2, rotation 0 0 0
  symmetric about XZ
  bounding box size 1.43803 10.9581 0.610015
  mass: Density=200 Shell_Flag=0 Mass_Area=1 Mass_Prior=0
  totals: TotalSpan=11 TotalProjectedSpan=10.9581 TotalChord=1.22222 TotalArea=13.4444 TotalAR=8.93163 MAC=1.23491
  root: chord 1.43791, twist 0, NACA 4-series Camber=0.02 CamberLoc=0.4 ThickChord=0.12
  sections:
    n  Span  Root_Chord  Tip_Chord  Area     Sweep  Sweep_Location  Dihedral  Twist  Twist_Location  tip airfoil
    1  5.5   1.43791     1.00654    6.72222  4      0               5         0      0               NACA 4-series Camber=0.02 CamberLoc=0.4 ThickChord=0.1
  SS_Control "Airfloil": EtaStart=0.96 EtaEnd=0.6 Length_C_Start=0.25 Length_C_End=0.25 Length_Start=0.255948 Length_End=0.294771 LE_Flag=0 Surf_Type=2

Custom "Load"
  location (X Y Z) 0.8 0 0, rotation 0 0 0
  bounding box size 1.5 1.5 0.75
  mass: Density=296.296 Shell_Flag=0 Mass_Area=1 Mass_Prior=1
  Design: Height=0.75 Length=1.5 SquareFlag=0 Width=1.5
  custom script Box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

Custom "Engine"
  location (X Y Z) 0.3 0 0, rotation 0 0 0
  bounding box size 0.5 0.5 0.5
  mass: Density=1600 Shell_Flag=0 Mass_Area=1 Mass_Prior=1
  Design: Height=0.5 Length=0.5 SquareFlag=0 Width=0.5
  custom script Box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

Wing "Tail"
  location (X Y Z) 6.25 0 0.15, rotation 0 0 0
  symmetric about XZ
  bounding box size 1.31924 4.99981 0.0947616
  mass: Density=0 Shell_Flag=1 Mass_Area=20 Mass_Prior=0
  totals: TotalSpan=5 TotalProjectedSpan=4.99981 TotalChord=0.81 TotalArea=4.05 TotalAR=6.17237 MAC=0.813333
  root: chord 0.9, twist 0, NACA 4-series Camber=0 CamberLoc=0.2 ThickChord=0.09
  sections:
    n  Span  Root_Chord  Tip_Chord  Area   Sweep  Sweep_Location  Dihedral  Twist  Twist_Location  tip airfoil
    1  2.5   0.9         0.72       2.025  12.5   0.25            -0.5      0      0.25            as above
  SS_Control "Elevator": EtaStart=0.2 EtaEnd=0.9 Length_C_Start=0.35 Length_C_End=0.35 Length_Start=0.3024 Length_End=0.2583 LE_Flag=0 Surf_Type=2

Wing "Vertical"
  location (X Y Z) 5.6 0 0.22, rotation 90 0 0
  bounding box size 2.42693 0.165703 2.07
  mass: Density=0 Shell_Flag=1 Mass_Area=20 Mass_Prior=0
  totals: TotalSpan=2.07 TotalProjectedSpan=2.07 TotalChord=1.265 TotalArea=2.61855 TotalAR=1.63636 MAC=1.35212
  root: chord 1.84, twist 0, NACA 4-series Camber=0 CamberLoc=0.2 ThickChord=0.09
  sections:
    n  Span  Root_Chord  Tip_Chord  Area     Sweep  Sweep_Location  Dihedral  Twist  Twist_Location  tip airfoil
    1  2.07  1.84        0.69       2.61855  35     0.25            0         0      0.25            as above
  SS_Control "timone": EtaStart=0.3 EtaEnd=0.89 Length_C_Start=0.4 Length_C_End=0.4 Length_Start=0.598 Length_End=0.3266 LE_Flag=0 Surf_Type=2

VSPAERO settings (reference component "Wing"): Sref=13.4444 bref=11 cref=1.23491 Xcg=2.61819 Ycg=-1.45168e-07 Zcg=0.0794772 AlphaStart=0 AlphaEnd=10 AlphaNpts=1 BetaStart=0 BetaEnd=0 BetaNpts=1 MachStart=0 MachEnd=0 MachNpts=1 ReCref=1e+06 Vinf=70 Rho=1.225
  control group "Ailerons": DeflectionAngle=0
  control group "Elevator": DeflectionAngle=0
  control group "Rudder": DeflectionAngle=0
